*Heading
** Job name: PDF1280_b1b2_22Compression Model name: PDF1280_b1b2_22_human
** Generated by: Abaqus/CAE 2019.HF1
*Preprint, echo=NO, model=NO, history=NO, contact=NO
**
** PARTS
**
*Part, name=PART-1-1
*Node
      1,          7.5,         -2.5,           3.
      2,           7.,         -2.5,           3.
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*Element, type=C3D8
   1,  218,  219,  250,  249,    1,    2,   33,   32
   2,  219,  220,  251,  250,    2,    3,   34,   33
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*Nset, nset=SET-1, generate
    1,  2387,     1
*Elset, elset=SET-1, generate
    1,  1800,     1
*Orientation, name=Ori-PART-1-1_DISCFIELD-1, system=RECTANGULAR
PART-1-1_DISCFIELD-1
1, 0.
** Section: Section-1-SET-1
*Solid Section, elset=SET-1, orientation=Ori-PART-1-1_DISCFIELD-1, material=MATERIAL-1
,
*Distribution, name=PART-1-1_DISCFIELD-1, location=ELEMENT, Table=PART-1-1_DISCFIELD-1_Table
,           1.,           0.,           0.,           0.,           1.,           0.
1,          0.5,     0.866025,           0.,    -0.866025,          0.5,           0.
2,          0.5,     0.866025,           0.,    -0.866025,          0.5,           0.
3,          0.5,     0.866025,           0.,    -0.866025,          0.5,           0.
4,          0.5,     0.866025,           0.,    -0.866025,          0.5,           0.
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1800,          0.5,    -0.866025,           0.,     0.866025,          0.5,           0.
*End Part
**
**
** ASSEMBLY
**
*Assembly, name=Assembly
**
*Instance, name=PART-1-1, part=PART-1-1
*End Instance
**
*Nset, nset=SET-2, instance=PART-1-1, generate
   31,  2387,    31
*Elset, elset=SET-2, instance=PART-1-1, generate
   30,  1800,    30
*Nset, nset=SET-3, instance=PART-1-1
    1,    2,    3,    4,    5,    6
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*Elset, elset=SET-3, instance=PART-1-1
    1,    2,    3,    4,    5,    6
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*Nset, nset=SET-4, instance=PART-1-1, generate
   1,  217,    1
*Elset, elset=SET-4, instance=PART-1-1, generate
   1,  180,    1
*Nset, nset=SET-5, instance=PART-1-1, generate
    1,  2357,    31
*Elset, elset=SET-5, instance=PART-1-1, generate
    1,  1771,    30
*Elset, elset=SET-MID, instance=PART-1-1
   15,   16,   45,   46,   75,   76
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*Nset, nset=SET-RF, instance=PART-1-1, generate
   31,  2387,    31
*Nset, nset=SET-Y, instance=PART-1-1, generate
 2186,  2372,    31
*Nset, nset=SET-Z, instance=PART-1-1, generate
  202,  2372,   217
*End Assembly
*Amplitude, name=AMP-1
             0.,              0.,              1.,              1.
**
** MATERIALS
**
*Material, name=MATERIAL-1
*Damping, alpha=160.
*Density
 1.06e-09,
*Depvar
      4,
*User Material, constants=17
 0.00022449,  1.6215,  0.0024,  1.8268,      1.,     0.1,  1048.9,    -1.7
 0.00158,   4750.,    4.35,    4.35,     0.1,    -30.,      1.,      0.
      0.,
*Distribution Table, name=PART-1-1_DISCFIELD-1_Table
coord3d, coord3d
** ----------------------------------------------------------------
**
** STEP: Step-1
**
*Step, name=Step-1, nlgeom=YES
*Dynamic, Explicit
, 1.
*Bulk Viscosity
0.06, 1.2
**
** BOUNDARY CONDITIONS
**
** Name: Disp-BC-1 Type: Displacement/Rotation
*Boundary
SET-2, 1, 1
** Name: Disp-BC-2 Type: Displacement/Rotation
*Boundary
SET-3, 3, 3
** Name: Disp-BC-3 Type: Displacement/Rotation
*Boundary
SET-4, 2, 2
** Name: Disp-BC-4 Type: Displacement/Rotation
*Boundary, amplitude=AMP-1
SET-5, 1, 1, -3.
**
** OUTPUT REQUESTS
**
*Restart, write, number interval=1, time marks=NO
**
** FIELD OUTPUT: F-Output-1
**
*Output, field, variable=PRESELECT
**
** HISTORY OUTPUT: H-Output-1
**
*Output, history
*Element Output, elset=SET-MID
LE11, S11
**
** HISTORY OUTPUT: H-Output-2
**
*Node Output, nset=SET-Y
U2,
**
** HISTORY OUTPUT: H-Output-3
**
*Node Output, nset=SET-Z
U3,
**
** HISTORY OUTPUT: H-Output-4
**
*Output, history, variable=PRESELECT
*End Step
