*Heading
** Job name: Job-MultiElement Model name: Model-1
** Generated by: Abaqus/CAE 2019.HF1
*Preprint, echo=NO, model=NO, history=NO, contact=NO
**
** PARTS
**
*Part, name=Part-1
*End Part
**
**
** ASSEMBLY
**
*Assembly, name=Assembly
**
*Instance, name=Part-1-1, part=Part-1
*Node
      1,          7.5,         -2.5,           3.
      2,           7.,         -2.5,           3.
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*Element, type=C3D8
   1,  218,  219,  250,  249,    1,    2,   33,   32
   2,  219,  220,  251,  250,    2,    3,   34,   33
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*Nset, nset=Set-1, generate
    1,  2387,     1
*Elset, elset=Set-1, generate
    1,  1800,     1
*Orientation, name=Ori-DiscField-1, system=RECTANGULAR
DiscField-1
1, 0.
** Section: Section-1
*Solid Section, elset=Set-1, orientation=Ori-DiscField-1, material=Material-1
,
*Distribution, name=DiscField-1, location=ELEMENT, Table=DiscField-1_Table
,           1.,           0.,           0.,           0.,           1.,           0.
1, 	0.500000, 	0.866025, 	0.000000, 	-0.866025, 	0.500000, 	0.000000
2, 	0.500000, 	0.866025, 	0.000000, 	-0.866025, 	0.500000, 	0.000000
3, 	0.500000, 	0.866025, 	0.000000, 	-0.866025, 	0.500000, 	0.000000
4, 	0.500000, 	0.866025, 	0.000000, 	-0.866025, 	0.500000, 	0.000000
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1800, 	0.500000, 	-0.866025, 	0.000000, 	0.866025, 	0.500000, 	0.000000
*End Instance
**
*Nset, nset=Set-2, instance=Part-1-1, generate
   31,  2387,    31
*Elset, elset=Set-2, instance=Part-1-1, generate
   30,  1800,    30
*Nset, nset=Set-3, instance=Part-1-1
    1,    2,    3,    4,    5,    6
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*Elset, elset=Set-3, instance=Part-1-1
    1,    2,    3,    4,    5,    6
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*Nset, nset=Set-4, instance=Part-1-1, generate
   1,  217,    1
*Elset, elset=Set-4, instance=Part-1-1, generate
   1,  180,    1
*Nset, nset=Set-5, instance=Part-1-1, generate
    1,  2357,    31
*Elset, elset=Set-5, instance=Part-1-1, generate
    1,  1771,    30
*Elset, elset=Set-mid, instance=Part-1-1
   15,   16,   45,   46,   75,   76
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*Nset, nset=Set-y, instance=Part-1-1, generate
 2186,  2372,    31
*Nset, nset=Set-z, instance=Part-1-1, generate
  202,  2372,   217
*Nset, nset=Set-rf, instance=PART-1-1, generate
   31,  2387,    31
*End Assembly
*Amplitude, name=Amp-1
             0.,              0.,              1.,              1.
**
** MATERIALS
**
*Material, name=Material-1
*Damping, alpha=160.
*Density
 1.06e-09,
*Depvar
      4,
*User Material, constants=17
 2.2449e-04,       1.6215, 0.0024,       1.8268,     1.,    0.1,  1048.9,    -1.7
 0.00158,   4750.,    4.35,    4.35,    0.10,    -30.,      1.,      0.
      0.,
*Distribution Table, name=DiscField-1_Table
coord3d, coord3d
** ----------------------------------------------------------------
**
** STEP: Step-1
**
*Step, name=Step-1, nlgeom=YES
*Dynamic, Explicit
, 1.
*Bulk Viscosity
0.06, 1.2
**
** BOUNDARY CONDITIONS
**
** Name: BC-1 Type: Displacement/Rotation
*Boundary
Set-2, 1, 1
** Name: BC-2 Type: Displacement/Rotation
*Boundary
Set-3, 3, 3
** Name: BC-3 Type: Displacement/Rotation
*Boundary
Set-4, 2, 2
** Name: BC-4 Type: Displacement/Rotation
*Boundary, amplitude=Amp-1
Set-5, 1, 1, 3.
**
** OUTPUT REQUESTS
**
*Restart, write, number interval=1, time marks=NO
**
** FIELD OUTPUT: F-Output-1
**
*Output, field, variable=PRESELECT
**
** HISTORY OUTPUT: H-Output-2
**
*Output, history
*Element Output, elset=Set-mid
S11, LE11
**
** HISTORY OUTPUT: H-Output-3
**
*Node Output, nset=Set-y
U2,
**
** HISTORY OUTPUT: H-Output-4
**
*Node Output, nset=Set-z
U3,
**
** HISTORY OUTPUT: H-Output-1
**
*Output, history, variable=PRESELECT
*End Step
